# OpenSim document version 40000
XsensDataReaderSettings:
  trial_prefix: synthetic_trial01
  data_folder: test
  ExperimentalSensors:
    ExperimentalSensor -SYNTH-ABCD: name_in_model=pelvis_imu
    ExperimentalSensor -SYNTH-EFGH: name_in_model=tibia_r_imu
    ExperimentalSensor -SYNTH-IJKL: name_in_model=femur_r_imu
    ExperimentalSensor -SYNTH-MNOP: name_in_model=tibia_l_imu
    ExperimentalSensor -SYNTH-QRST: name_in_model=femur_l_imu
