# OpenSim document version 40000
MarkerSet kg_gait2392_thelen2003muscle_Marker_Set:
  Marker RFoot2: toes_r (0.0612 0.018 -0.02108)
  Marker LFoot2: toes_l (0.0612 0.018 0.02108)
  Marker LFoot1: calcn_l (-0.02 0.0164746 0.00682153)
  Marker RFemur6: femur_r (0 -0.406982 0.0510379)
  Marker LFemur6: femur_l (0 -0.406982 -0.0510379)
  Marker LTibia6: tibia_l (-0.003 -0.41 -0.056)
  Marker RTibia6: tibia_r (-0.003 -0.41 0.056)
  Marker RFoot1: calcn_r (-0.02 0.0164746 -0.00682153)
  Marker RFemur5: femur_r (0 -0.406982 -0.0510379)
  Marker LFemur5: femur_l (0 -0.406982 0.0510379)
  Marker RTibia5: tibia_r (0.004 -0.4 -0.036)
  Marker LTibia5: tibia_l (0.004 -0.4 0.036)
  Marker RFoot3: toes_r (0.0162 0.022 0.03392)
  Marker LFoot3: toes_l (0.0162 0.022 -0.03392)
  Marker Torso4: torso (-0.07679775 0.4131205 0)
  Marker Torso2: torso (0.007192548 0.4173659 0.1511445)
  Marker Torso3: torso (0.00719255 0.417366 -0.151145)
  Marker Torso1: torso (0.04990762 0.3654091 0)
  Marker RFemur1: femur_r (-0.0233834 -0.170475 0.07)
  Marker RFemur2: femur_r (0.03 -0.1819453 0.07)
  Marker RFemur3: femur_r (0.03 -0.248905 0.07)
  Marker RFemur4: femur_r (-0.01890041 -0.2337079 0.07)
  Marker LFemur2: femur_l (-0.0233834 -0.181945 -0.07)
  Marker LFemur1: femur_l (0.03 -0.170475 -0.07)
  Marker LFemur4: femur_l (0.03 -0.233708 -0.07)
  Marker LFemur3: femur_l (-0.0189004 -0.248905 -0.07)
  Marker RTibia1: tibia_r (-0.032481 -0.165038 0.06)
  Marker RTibia2: tibia_r (0.0237235 -0.184276 0.06)
  Marker RTibia3: tibia_r (0.02253368 -0.262393 0.05854924)
  Marker RTibia4: tibia_r (-0.03308797 -0.245354 0.06)
  Marker LTibia2: tibia_l (-0.032481 -0.184276 -0.06)
  Marker LTibia1: tibia_l (0.0237235 -0.165 -0.06)
  Marker LTibia4: tibia_l (0.0225337 -0.245 -0.0585492)
  Marker LTibia3: tibia_l (-0.033088 -0.262393 -0.06)
  Marker Pelvis1: pelvis (-0.20897 0.0285878 -0.06334143)
  Marker Pelvis4: pelvis (-0.20897 -0.0507453 -0.0633414)
  Marker Pelvis3: pelvis (-0.20897 -0.0507453 0.0633414)
  Marker Pelvis2: pelvis (-0.20897 0.0285878 0.0633414)
  Marker RFoot4: calcn_r (0.128 0.065 0)
  Marker RFoot5: calcn_r (0.16 0.05 0)
  Marker LFoot4: calcn_l (0.128 0.065 0)
  Marker LFoot5: calcn_l (0.16 0.05 0)
  Marker Pelvis_LFemur_score: femur_l (0 0 0)
  Marker Pelvis_RFemur_score: femur_r (0 0 0)
  Marker RKnee: tibia_r (0 0 0)
  Marker LKnee: tibia_l (0 0 0)
  Marker RTibia_RFoot_score: talus_r (0 0 0)
  Marker LTibia_LFoot_score: talus_l (0 0 0)
  Marker RFoot1_flat: calcn_r (-0.02 0 -0.00682153)
  Marker RFoot2_flat: toes_r (0.0612 0 -0.02108)
  Marker RFoot3_flat: toes_r (0.0162 0 0.03392)
  Marker LFoot1_flat: calcn_l (-0.02 0 0.00682153)
  Marker LFoot2_flat: toes_l (0.0612 0 0.02108)
  Marker LFoot3_flat: toes_l (0.0162 0 -0.03392)
  Marker RFoot4_flat: calcn_r (0.128 0 0)
  Marker RFoot5_flat: calcn_r (0.16 0 0)
  Marker LFoot4_flat: calcn_l (0.128 0 0)
  Marker LFoot5_flat: calcn_l (0.16 0 0)
  Marker RASIS: pelvis (0.008583436 0.003683379 0.1238076)
  Marker LASIS: pelvis (0.008583436 0.003683379 -0.1238076)
