# OpenSim document version 40000
# Specifies parameters for scaling the model.
ModelScaler:
  apply: true
  scaling_order: measurements manualScale
  marker_file: subject01_calib_static_markers_rotated.trc
  time_range: 1 2
  preserve_mass_distribution: true
  output_model_file: subject01_scaledOnly.osim
  output_scale_file: subject01_scaleSet_applied.xml
  MeasurementSet kg_gait2392_thelen2003muscle:
    Measurement torso: apply=true
      MarkerPair: markers=(Torso1 Pelvis1)
      MarkerPair: markers=(Torso2 Pelvis2)
      MarkerPair: markers=(Torso3 Pelvis3)
      MarkerPair: markers=(Torso4 Pelvis4)
      BodyScale torso: axes=(X Y Z)
    Measurement pelvis: apply=true
      MarkerPair: markers=(Pelvis_LFemur_score Pelvis_RFemur_score)
      MarkerPair: markers=(Pelvis1 Pelvis2)
      MarkerPair: markers=(Pelvis3 Pelvis4)
      BodyScale pelvis: axes=(X Y Z)
    Measurement thigh_r: apply=true
      MarkerPair: markers=(Pelvis_RFemur_score RKnee)
      MarkerPair: markers=(Pelvis_RFemur_score RFemur5)
      MarkerPair: markers=(Pelvis_RFemur_score RFemur6)
      BodyScale femur_r: axes=(X Y Z)
      BodyScale patella_r: axes=(X Y Z)
    Measurement thigh_l: apply=true
      MarkerPair: markers=(Pelvis_LFemur_score LKnee)
      MarkerPair: markers=(Pelvis_LFemur_score LFemur5)
      MarkerPair: markers=(Pelvis_LFemur_score LFemur6)
      BodyScale femur_l: axes=(X Y Z)
      BodyScale patella_l: axes=(X Y Z)
    Measurement shank_r: apply=true
      MarkerPair: markers=(RKnee RTibia_RFoot_score)
      MarkerPair: markers=(RKnee RTibia5)
      MarkerPair: markers=(RKnee RTibia6)
      BodyScale tibia_r: axes=(X Y Z)
      BodyScale talus_r: axes=(X Y Z)
    Measurement shank_l: apply=true
      MarkerPair: markers=(LKnee LTibia_LFoot_score)
      MarkerPair: markers=(LKnee LTibia5)
      MarkerPair: markers=(LKnee LTibia6)
      BodyScale tibia_l: axes=(X Y Z)
      BodyScale talus_l: axes=(X Y Z)
    Measurement foot_r: apply=true
      MarkerPair: markers=(RFoot1 RFoot2)
      MarkerPair: markers=(RFoot1 RFoot3)
      BodyScale calcn_r: axes=(X Y Z)
      BodyScale toes_r: axes=(X Y Z)
    Measurement foot_l: apply=true
      MarkerPair: markers=(LFoot1 LFoot2)
      MarkerPair: markers=(LFoot1 LFoot3)
      BodyScale calcn_l: axes=(X Y Z)
      BodyScale toes_l: axes=(X Y Z)
